# NUFEB simulation

atom_style	bio
atom_modify	map array sort 1000 5.0e-7
boundary	ff ff ff
newton		off
#processors  2 1 1

comm_modify	vel yes
read_data_bio atom.in

group AOB type 1
#group NOB type 2
group HET type 2
group DEAD type 3
#group EPS type 5


neighbor	5.0e-7 bin
neigh_modify	delay 0 one 5000

#pair_style none
pair_style  gran/hooke/history 0.000200 NULL 0.000050 NULL 0.0 1

pair_coeff  * *
timestep 3600

fix 1 all nve/limit 3e-7
#fix 1 all nve/limit 1e-8

#fix	 2 all gravity 1.47 vector 0 0 -1 # spherical 90.0 -180.0
#fix     3 all fdrag
fix 10 all viscous 0.1

fix xw all wall/gran hooke/history 20000 NULL 5000.0 NULL 1.5 0 xplane  0.0   0.08e-04
fix yw all wall/gran hooke/history 20000 NULL 5000.0 NULL 1.5 0 yplane  0.0   0.08e-04
fix zw all wall/gran hooke/history 20000 NULL 5000.0 NULL 1.5 0 zplane  0.0   0.08e-04

variable kanc equal 50

fix xwa all walladh v_kanc xplane  0.0   0.08e-04
fix ywa all walladh v_kanc yplane  0.0   0.08e-04
fix zwa all walladh v_kanc zplane  0.0   0.08e-04

##############Ibm variable definitions##############

#Defining EPS density and ratio variables
variable EPSdens equal 30
variable EPSratio equal 1.25
variable divMass equal 1.52e-16
variable deadMass equal 1e-17

variable ke equal 5e+10

#Defining kinetics variables
variable temp equal 298.15
variable gasTran equal 0.08205746
variable gvol equal 8e-14
variable rth equal 0.0083144
variable pressure equal 1
variable ph equal 7.0

#Defining diffusion variables
variable diffT equal 1e-3
variable tol equal 1e-5

#Defining compute variables
variable cutoff equal 9.66e-7

##############Ibm fix##############

fix k1 all kinetics 10 10 10 v_temp v_rth v_gvol v_gasTran v_ph
fix g1 all diffusion exp v_diffT v_tol pp pp nd 1
#fix ki3 all kinetics/ph 1
fix ki2 all kinetics/thermo 1 fix open v_pressure
fix ki1 all kinetics/monod 1 v_EPSdens

fix d1 all divide 1 v_EPSdens v_divMass 66666
fix d5 all death 1 v_deadMass

#fix j1 all epsadh 1 v_ke 1
#fix e1 HET eps_extract 1 v_EPSratio v_EPSdens 66666

##############Ibm compute##############

compute myNtypes all ntypes
compute myMass all biomass
compute myDia all diameter
compute myDimen all dimension
compute myDiver all diversity
compute myHeight all height 50 50
compute myRough all roughness 50 50
compute mySeg all segregation v_cutoff

##############Simulation outputs##############

dump		id all custom 20 snapshot.bubblemd id type diameter x y z
dump            d0 all bio 20 biomass conc DGRAn DGRCat ph gas
#thermo_style    custom step cpu atoms c_myNtypes[*] c_myMass[*] c_myDia c_myDimen c_myDiver[*] c_myHeight c_myRough c_mySeg
thermo_style    custom step cpu atoms c_myNtypes[*]
thermo		1
thermo_modify	lost ignore

#run 1
run  100
